# This is the supplement to the paper by Tatyana Averina (ata@osmf.sscc.ru)
# and Konstantin Rybakov (rkoffice@mail.ru) "Analysis and Conditional Optimization
# of Projection Estimates for Distribution of Random Variable Using Legendre Polynomials" (Algorithms 2025, 1X(X), XX. https://doi.org/10.3390/...)
#
# Abstract. Algorithms for jointly obtaining projection estimates of the density and distribution function of a random variable using the Legendre polynomials are proposed. For these algorithms, a problem of the conditional optimization is solved. Such an optimization allows one increasing the approximation accuracy with a minimum computational costs. The proposed algorithms are tested on examples with different degree of smoothness of the density. A projection estimate of the density is compared to a histogram, which is often used in applications to estimate distributions.
# Legendre polynomials (recurrence relations)
_p(i, t) :=
    1 if i ≤ 0
    1/i*((2*i - 1)*t*_p(i - 1, t) - (i - 1)*_p(i - 2, t)) otherwise
p(i, t) := sqrt((2*i + 1)/2)*_p(i, t)
pt(L, t) :=
    for i ∈ 0 .. L - 1
        c[0] ← 1 if i == 0
        c[1] ← t if i == 1
        c[i] ← 1/i*((2*i - 1)*t*c[i - 1] - (i - 1)*c[i - 2]) if i > 1
    for i ∈ 0 .. L - 1
        c[i] ← sqrt((2*i + 1)/2)*c[i]
    c
# Two-parameter family of densities with different degrees of smoothness
# and related distribution functions
n := 1
nL := n
nR := n + 1
g1(x) := 1 - (-x)^nL
g2(x) := 1 - x^nR
γ := integral(g1(x), x = -1 .. 0) + integral(g2(x), x = 0 .. 1) → 7/6
g1(x) := (1 - (-x)^nL)/γ
f1(x) := integral(g1(ξ), ξ = -1 .. x) → 3*(x + 1)^2/7
g2(x) := (1 - x^nR)/γ
f2(x) := f1(0) + integral(g2(ξ), ξ = 0 .. x) → 3/7 - 2*x*(x^2 - 3)/7
g(x) :=
    g1(x) if x < 0
    g2(x) otherwise
f(x) :=
    f1(x) if x < 0
    f2(x) otherwise
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N2 := integral(g1(x)^2, x = -1 .. 0) + integral(g2(x)^2, x = 0 .. 1) → 156/245
F2 := integral(f1(x)^2, x = -1 .. 0) + integral(f2(x)^2, x = 0 .. 1) → 235/343
f0 := f(0) → 3/7
# Modeling the random variable with given test density
gen(nL, nR) :=
    r ← rnd(1)
    root(f1(x) - r, x, -1, 0) if r < f0
    root(f2(x) - r, x, 0, 1) otherwise  # disabled
gen1(nL, nR) :=
    r ← rnd(1)
    sqrt(7*r/3) - 1 if r < f0
    otherwise
        A ← nthroot(-(7*r - 3)/4 + sqrt(((7*r - 3)/4)^2 - 1), 3)
        -Re(A) + sqrt(3)*Im(A)
# Expansion coefficients of test functions
spF1(L) :=
    c[0] ← sqrt(2)
    for i ∈ 1 .. L - 1
        c[i] ← 0
    c
spFt1(L) :=
    c[0] ← 0
    c[1] ← sqrt(6)/3
    for i ∈ 2 .. L - 1
        c[i] ← 0
    c
_spF1L(L) :=
    c[0] ← 1
    c[1] ← -1/2
    for i ∈ 2 .. L
        c[i] ← 0 if mod(i, 2) == 0
        c[i] ← (2 - i)/(i + 1)*c[i - 2] otherwise
    c
_spF1R(L) :=
    c[0] ← 1
    c[1] ← 1/2
    for i ∈ 2 .. L
        c[i] ← 0 if mod(i, 2) == 0
        c[i] ← (2 - i)/(i + 1)*c[i - 2] otherwise
    c
spFtnL(L, n) :=
    c ← _spF1L(L + n)
    for k ∈ 1 .. n
        for i ∈ 0 .. L + n - k - 1
            r[i] ← ((i + 1)*c[i + 1] + if(i == 0, 0, i*c[i - 1]))/(2*i + 1)
        c ← r
    for i ∈ 0 .. L - 1
        b[i] ← sqrt((2*i + 1)/2)*c[i]
    b
spFtnR(L, n) :=
    c ← _spF1R(L + n)
    for k ∈ 1 .. n
        for i ∈ 0 .. L + n - k - 1
            r[i] ← ((i + 1)*c[i + 1] + if(i == 0, 0, i*c[i - 1]))/(2*i + 1)
        c ← r
    for i ∈ 0 .. L - 1
        b[i] ← sqrt((2*i + 1)/2)*c[i]
    b
G2F(G) :=
    F[0] ← G[0] - G[1]/sqrt(3)
    for i ∈ 1 .. rows(G) - 2
        F[i] ← G[i - 1]/sqrt((2*i - 1)*(2*i + 1)) - G[i + 1]/sqrt((2*i + 1)*(2*i + 3))
    F
spDensity(L, nL, nR) := (spF1(L) - (-1)^nL*spFtnL(L, nL) - spFtnR(L, nR))/γ
spDistribution(L, nL, nR) := 1/γ*(nL/(nL + 1)*spF1(L) + spFt1(L) + (-1)^(nL + 1)*spFtnL(L, nL + 1)/(nL + 1) - spFtnR(L, nR + 1)/(nR + 1))
# Numerical experiment
getError(Error) :=
    for j ∈ 0 .. rows(Error) - 2
        μ[j] ← Error[j]/Error[j + 1]
    μ
i := 0 .. 4
L[i] := 2^(i + 2) + 1
transpose(L) = [5, 9, 17, 33, 65]
j := 0 .. 10
M[j] := 2^(9 + j)
GError[i] :=
    G ← spDensity(L[i], nL, nR)
    sqrt(N2 - |G|^2)
FError[i] :=
    F ← spDistribution(L[i], nL, nR)
    sqrt(F2 - |F|^2)
transpose(GError) = [0.0246144, 0.00979984, 0.00383802, 0.00144216, 0.000526888]
transpose(FError) = [0.0057716, 0.00106925, 0.000197849, 3.60299e-5, 6.47824e-6]
transpose(getError(GError)) = [2.51171, 2.55336, 2.66131, 2.73712]
transpose(getError(FError)) = [5.39779, 5.40438, 5.49124, 5.56169]
SGError :=
    l ← rows(L)
    m ← rows(M)
    maxL ← L[l - 1]
    minM ← 1
    maxM ← M[0]
    GA ← spDensity(maxL, nL, nR)
    GB ← 0
    for j ∈ 0 .. m - 1
        for k ∈ minM .. maxM
            GB ← GB + pt(maxL, gen1(nL, nR))
        for i ∈ 0 .. l - 1
            Res[j, i] ← sqrt(N2 - |submatrix(GA, 0, L[i] - 1, 0, 0)|^2 + |submatrix(GA, 0, L[i] - 1, 0, 0) + (-maxM^-1*submatrix(GB, 0, L[i] - 1, 0, 0))|^2)
        minM ← maxM + 1
        maxM ← 2*maxM
    Res
SFError :=
    l ← rows(L)
    m ← rows(M)
    maxL ← L[l - 1]
    minM ← 1
    maxM ← M[0]
    FA ← spDistribution(maxL, nL, nR)
    FB ← 0
    for j ∈ 0 .. m - 1
        for k ∈ minM .. maxM
            FB ← FB + pt(maxL + 1, gen1(nL, nR))
        for i ∈ 0 .. l - 1
            Res[j, i] ← sqrt(F2 - |submatrix(FA, 0, L[i] - 1, 0, 0)|^2 + |submatrix(FA, 0, L[i] - 1, 0, 0) + (-maxM^-1*G2F(submatrix(FB, 0, L[i], 0, 0)))|^2)
        minM ← maxM + 1
        maxM ← 2*maxM
    Res
SGError = [
    0.0360193, 0.0502776, 0.116814, 0.158117, 0.229694;
    0.0255493, 0.0399015, 0.085427, 0.122681, 0.161492;
    0.0275488, 0.022874, 0.0518374, 0.0843108, 0.108091;
    0.0266777, 0.0203449, 0.0317411, 0.055921, 0.079042;
    0.024988, 0.0187036, 0.0220844, 0.036861, 0.0510371;
    0.0250432, 0.0134085, 0.0202743, 0.0308391, 0.0382277;
    0.0262764, 0.0168771, 0.0169542, 0.0265242, 0.032623;
    0.0248422, 0.0108925, 0.0113337, 0.0158959, 0.0211226;
    0.0250365, 0.0109782, 0.0090752, 0.0102425, 0.013718;
    0.0246764, 0.0100858, 0.00587281, 0.00574329, 0.0099464;
    0.0246265, 0.00992533, 0.00455829, 0.00463245, 0.0073813
]
SFError = [
    0.0160908, 0.016656, 0.017273, 0.0178676, 0.0181813;
    0.00837075, 0.00741979, 0.00767176, 0.00800353, 0.00833473;
    0.00765679, 0.00613266, 0.00654924, 0.0067824, 0.00688153;
    0.00882834, 0.00726593, 0.00726854, 0.00742113, 0.00745836;
    0.00829972, 0.00630023, 0.00627928, 0.00639317, 0.00641459;
    0.00640534, 0.00304238, 0.00290336, 0.00298147, 0.00301929;
    0.00675585, 0.00370823, 0.00356481, 0.00360872, 0.00362272;
    0.00614588, 0.00242124, 0.00219865, 0.00224003, 0.0022486;
    0.00600628, 0.0020223, 0.00174048, 0.00175095, 0.00175621;
    0.00588369, 0.0015731, 0.00118694, 0.00119978, 0.0012037;
    0.00581436, 0.00128769, 0.000749757, 0.000735097, 0.000737507
]
